<Lems>

<!--

    Note: Not yet complete!
    Contact p.gleeson =at= ucl.ac.uk if you are interested in using/contributing to this model.

-->

<!-- Specify which component to run -->
<Target component="sim1"/>

<!-- Include core NeuroML2 ComponentType definitions -->
<Include file="Cells.xml"/>
<Include file="Networks.xml"/>
<Include file="Simulation.xml"/>

<!-- Include core NeuroML2 ComponentType definitions -->
<Include file="PinskyRinzelCA3CompType.xml"/>

<pinskyRinzelCA3Cell id="pr0" Ip0="0.75" gLs="0.1" gLd="0.1" gNa="0" gKdr="15"
        gCa="0" gKahp="0" gKC="0" VNa="60" VCa="80" VK="-75" VL="-60"
        Vsyn="0" gc="2.1" pp="0.5" Cm="3" alphac="2" betac="0.1"/>

<pinskyRinzelCA3Cell id="pr1" Ip0="0.75" gLs="0.1" gLd="0.1" gNa="30" gKdr="15"
        gCa="10" gKahp="0.8" gKC="15" VNa="60" VCa="80" VK="-75" VL="-60"
        Vsyn="0" gc="2.1" pp="0.5" Cm="3" alphac="2" betac="0.1"/>

<network id="net1">
    <population id="pr1pop" component="pr0" size="1"/>
</network>

<!-- End of NeuroML2 content -->

<Simulation id="sim1" length="1500ms" step="0.05s" target="net1">

    <Display id="d1" title="Fig 2A..." timeScale="1ms" xmin="-100" xmax="1600" ymin="-70" ymax="30">
        <Line id ="Vs" quantity="pr1pop[0]/Vs" scale="1"  color="#000000" timeScale="1ms"/>
        <Line id ="Vd" quantity="pr1pop[0]/Vd" scale="1"  color="#FF0000" timeScale="1ms"/>
    </Display>
    <!--
    <Display id="d2" title="Currents..." timeScale="1s" xmin="-20" xmax="240" ymin="-400" ymax="400">
        <Line id ="fn1" quantity="pr1pop[0]/IL" scale="1"  color="#FFFFFF" timeScale="1s"/>
        <Line id ="fn2" quantity="pr1pop[0]/IK" scale="1"  color="#FF22FF" timeScale="1s"/>
        <Line id ="fn3" quantity="pr1pop[0]/ICa" scale="1"  color="#FF0000" timeScale="1s"/>
    </Display>
    <Display id="d3" title="N..." timeScale="1s" xmin="-20" xmax="240" ymin="-0.1" ymax="1.1">
        <Line id ="fn1" quantity="pr1pop[0]/N" scale="1"  color="#FFFFFF" timeScale="1s"/>
        <Line id ="fn2" quantity="pr1pop[0]/Nss" scale="1"  color="#000000" timeScale="1s"/>
    </Display>-->

</Simulation>

</Lems>
